# Worksheet setting: ORIGIN = 1
P_атм := 745 torr
ммвдст := 9.80665 Pa
кПа := kPa
м := m
с := s
кг := kg
мм := mm
ΔP_0 := [268, -295]*ммвдст
ΔP_j := [260, -220]*ммвдст
ΔP_ст1 := [32, -38]*ммвдст
ΔP_ст2 := [-10, 8]*ммвдст
t_01 := 22.4 °C
t_02 := 22.7 °C
x := 475 mm
table  # each column defines a variable
    y (mm) | ΔP_з (ммвдст) | ΔP (ммвдст)
    0.1 | [83, -106] | 189
    0.2 | [92, -116] | 208
    0.3 | [100, -128] | 228
    0.5 | [110, -140] | 250
    0.7 | [120, -151] | 271
    1.0 | [132, -167] | 299
    1.3 | [142, -177] | 319
    1.6 | [150, -188] | 338
    1.9 | [156, -199] | 355
    2.2 | [165, -207] | 372
    2.5 | [170, -214] | 384
    2.8 | [172, -218] | 390
    3.1 | [175, -220] | 395
    3.5 | [182, -228] | 410
    4.5 | [188, -235] | 423
    5.0 | [188, -236] | 424
    5.5 | [192, -240] | 432
    6.0 | [192, -240] | 432
    6.5 | [192, -240] | 432
end table
ΔP_0 := |ΔP_0[:, 1]| + |ΔP_0[:, 2]| = 563 ммвдст
ΔP_j := |ΔP_j[:, 1]| - |ΔP_j[:, 2]| = 40 ммвдст
P_з := ΔP + P_атм = [101.179; 101.365; 101.561; 101.777; 101.983; 102.257; 102.453; 102.64; 102.807; 102.973; 103.091; 103.15; 103.199; 103.346; 103.473; 103.483; 103.562; 103.562; 103.562] кПа
P_0 := ΔP_0 + P_атм = 104.846 кПа
P_j := ΔP_j + P_атм = 99.7174 кПа
δ := 5.5 mm
ρ_0 := PropsSI("D", "T", t_01, "P", P_0, "Air")*кг/м^3 = 1.2363 кг/м^3
P_δmax := max(ΔP) + P_атм = 103.562 кПа
c_max := sqrt(2*(P_δmax - P_j)/ρ_0) = 78.8599 м/с
c := sqrt(2*(P_з - P_j)/ρ_0) = [48.619; 51.6259; 54.6125; 57.7195; 60.5367; 64.1007; 66.5296; 68.7577; 70.6917; 72.5742; 73.8741; 74.5156; 75.0459; 76.615; 77.9493; 78.051; 78.8599; 78.8599; 78.8599] м/с
λ := c/c_max = [0.616524; 0.654654; 0.692526; 0.731925; 0.767649; 0.812843; 0.843644; 0.871897; 0.896421; 0.920293; 0.936777; 0.944911; 0.951637; 0.971534; 0.988454; 0.989743; 1; 1; 1]
y_δ := 5.0 мм
y_отн := y/y_δ = [0.02; 0.04; 0.06; 0.1; 0.14; 0.2; 0.26; 0.32; 0.38; 0.44; 0.5; 0.56; 0.62; 0.7; 0.9; 1; 1.1; 1.2; 1.3]
v := PropsSI("V", "T", t_01, "P", P_0, "Air")*м^2/с = 1.83228e-5 м^2/с
Re := x*c/v = [1260402; 1338353; 1415777; 1496324; 1569358; 1661751; 1724718; 1782478; 1832615; 1881417; 1915116; 1931746; 1945495; 1986172; 2020763; 2023399; 2044368; 2044368; 2044368]
δ_j := 0.37*x*Re^-0.2 = [0.0105875; 0.0104612; 0.0103442; 0.0102303; 0.0101333; 0.010018; 0.00994378; 0.00987849; 0.00982384; 0.00977233; 0.0097377; 0.00972087; 0.0097071; 0.00966701; 0.00963368; 0.00963117; 0.00961133; 0.00961133; 0.00961133] м
λ_теор := (y/δ_j)^(1/7) = [0.51374; 0.568189; 0.60304; 0.649719; 0.682641; 0.719501; 0.747774; 0.771012; 0.790802; 0.808145; 0.823456; 0.837103; 0.849536; 0.864904; 0.896963; 0.910599; 0.923354; 0.934904; 0.945655]
# [chart]
    X[1] := y_отн
    X[2] := y_отн
    Y[1] := λ
    Y[2] := λ_теор
