N := 4
# Задача №1
# Дано:
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H := (100 + 3*N)*m = 112 m
h_2 := (20 + 1*N)*mm = 0.024 m
ρ_в := (1.1 + 0.01*N)*kg/m^3 = 1.14 kg/m^3
ρ_н := (1.3 + 0.01*N)*kg/m^3 = 1.34 kg/m^3
ρ_воды := 10^3*kg/m^3
p_а := 10^5*Pa
# Найти: | h_1
# Решение:
p_C := p_а - ρ_н*g*H = 98528.2 Pa
p_B := ρ_воды*g*h_2 + p_C = 98763.6 Pa
p_A := p_B + ρ_в*g*H = 100016 Pa
p_A == p_а + ρ_воды*g*h_1
h_1 := (p_A - p_а)/(ρ_воды*g) = 1.6 mm
h_answer := h_1
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№2
p_m := 7800  # кг/м^3
p_w := 1000  # кг/м^3
δ := 2*10^-3  # м
l := 1 + 0.1*N = 1.4  # м
H := 5 + 0.1*N = 5.4  # м
α := 60
b := 2 + 0.1*N = 2.4  # м
g := 9.807  # м/с^2
P == dF/dS
dF == P*dS
P == p_w*g*x
sin(α) == b*dx/dS
dF == b*dx/sin(α)*(p_w*g*x)
F == b*p_w*g*x^2/(2*sin(α))
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cos(α) == F_верт/F
F_верт == b*p_w*g*x^2/(2*sin(α))*cos(α)
tan(α*3.14/180) = 1.72993
V_внешнее := b*0.5*H*(l + l + 2*H/tan(α*3.14/180)) = 58.5988  # м^3
V_внутреннее := (b - δ)*0.5*H*(l - δ + l - δ + 2*H/tan(α*3.14/180)) = 58.5241  # м^3
V := V_внешнее - V_внутреннее = 0.0747308  # м^3
m := p_m*V = 582.9  # кг
F_т := m*g = 5716.5  # н
x := F_т == b*p_w*g*x^2/(2*sin(α*3.14/180))*cos(α*3.14/180) solve, x → [-0.916685898598; 0.916685898598]
Ответ
x[1] = 0.916686  # м
x_answer := x[1]
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№3
ρ := 1000  # кг/м^3
g := 9.8  # м/с^2
H := 10 + 0.01*N = 10.04  # м
d := 0.01 + 0.001*N = 0.014  # м
D := 0.05 + 0.001*N = 0.054  # м
h := 0.05 + 0.001*N = 0.054  # м
B := 10^5  # Па
# P в точке D и G = ?
# Теорема Торричелли
c_d := sqrt(2*g*H) = 14.028  # м/с
# Найду площадь верхнего и нижнего сечения
F_D := π*(D/2)^2 = 0.00229022  # м^2
F_d := π*(d/2)^2 = 0.000153938  # м^2
# Уравнение неразрывности
c_D := c_D*F_D == c_d*F_d solve, c_D → 0.942895241066
c_D = 0.942895  # м/с
# Уравнение Бернулли для идеальной жидкости
P_D := B/ρ + c_d^2/2 + g*h == P_D/ρ + c_D^2/2 solve, P_D → 198476.674282
p_Danswer := P_D = 198477  # Па
G := ρ*c_D*F_D = 2.15944  # кг/с
G_answer := G
# Ответ
P_D = 198477  # Па
G = 2.15944  # кг/с
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№4
ρ_w := 1000  # кг/м^3
ρ_a := 1.2  # кг/м^3
d := 0.05 + 0.001*N = 0.054  # м
h := (100 + 10*N)*10^-3 = 0.14  # м
B := 10^5  # Па
g := 9.8  # м/с^2
F_d := π*(d/2)^2 = 0.00229022  # м^2
P_d := B - ρ_w*g*0.180 = 98236  # Па
# Так как D>>d c2 = 0 можно пренебречь
c_2 := 0  # м/с
c_d := c_d^2/2 + P_d/ρ_a == c_2^2/2 + B/ρ_a solve, c_d → [-54.2217668469; 54.2217668469]
c_d[1] = 54.2218  # м/с
G := ρ_a*c_d[1]*F_d = 0.149016  # кг/с
G_answer4 := G
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№5
H := (180 - 5*N)*10^-3 = 0.16
h := (130 + 10*N)*10^-3 = 0.17
X := 1.4 - 0.01*N = 1.36
d_1/d_2 == X
# Так как D>>d1, D>>d2
c_D := 0  # м/с
c_1 := sqrt(2*g*H) = 1.77088  # м/с
# Уравнение неразрывности
c_1*F_1 == c_2*F_2
c_1*d_1^2 == c_2*d_2^2
c_2 := X^2*c_1 = 3.27541  # м/с
P_1 := B = 100000  # Па
# Уравнение
# Бернулли
P_2 := c_1^2*ρ_w/2 + P_1 == c_2^2*ρ_w/2 + P_2 solve, P_2 → 96203.8403891
P_2 = 96203.8  # Па
y := P_2 == B - ρ_w*g*y solve, y → 0.3873632256
y = 0.387363  # м
y_answer := y
y > h  # значит вода течет вверх
# Ответ
# Заданий №1
h_answer = 1.6 mm
# Задание №2
x_answer = 0.916686  # m
# Задание №3
p_Danswer = 198477  # Па
G_answer = 2.15944  # кг/с
# Задание №4
G_answer4 = 0.149016  # кг/с
# Задание №5
y_answer = 0.387363  # м
y > h  # значит вода течет вверх
