# Вариант №8
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# Задача 1
# Дано
N := 8
β_1 := (40 - N)*° = 0.558505
β_2 := (60 - N)*° = 0.907571
# Решение
# Направим ось Y вверх, ось X вправо
# Уравнение неразрывности в проекции на ось Y
c*t*sin(β_1) == w*t*sin(β_2)
w/c == sin(β_1)/sin(β_2)  # (1)
# Уравнение количества движения
p_1 + ρ*c^2 == p_2 + ρ*w^2
# В проекции на ось Y
p_1*t*sin(β_2) + ρ*c^2*t*sin(β_1)*cos(β_2 - β_1) == p_2*t*sin(β_2) + ρ*w^2*t*sin(β_2)
p_1*t*sin(β_2) - p_2*t*sin(β_2) == ρ*w^2*t*sin(β_2) - ρ*c^2*t*sin(β_1)*cos(β_2 - β_1)
p_1 - p_2 == ρ*w^2 - ρ*c^2*sin(β_1)*cos(β_2 - β_1)/sin(β_2)
p_1 - p_2 == ρ*w^2 - ρ*c*w*cos(β_2 - β_1)  # (2)
# Уравнение Бернулли для случая течения без потерь
p_1 + ρ*c^2/2 == p_2ид + ρ*w^2/2
p_2ид - p_1 == ρ*c^2/2 - ρ*w^2/2  # (3)
# Складываем уравнения (2) и (3)
p_2ид - p_1 + p_1 - p_2 == ρ*c^2/2 - ρ*w^2/2 + ρ*w^2 - ρ*c*w*cos(β_2 - β_1)
p_2ид - p_2 == ρ*c^2/2 + ρ*w^2/2 - ρ*c*w*cos(β_2 - β_1)
# Коэффициент потери давления
ξ == (p_2ид - p_2)/(1/2*ρ*c^2)
ξ == (ρ*c^2/2 + ρ*w^2/2 - ρ*c*w*cos(β_2 - β_1))/(1/2*ρ*c^2)
ξ == 1 + w^2/c^2 - 2*w/c*cos(β_2 - β_1)
ξ == 1 + (sin(β_1)/sin(β_2))^2 - 2*sin(β_1)/sin(β_2)*cos(β_2 - β_1)
ξ := 1 + (sin(β_1)/sin(β_2))^2 - 2*sin(β_1)/sin(β_2)*cos(β_2 - β_1) = 0.188382
ξ_answer := ξ
# Задача 2
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# Дано
d_1 := 150 mm
d_2 := 300 mm
G := (20 - 0.3*N)*kg/s = 17.6 kg/s
p_1 := (9 + 0.1*N)*10^5*Pa = 980000 Pa
T_1 := (300 + 10*N)*K = 380 K
p_н := 10^6*Pa
# Решение
F_1 := π*(d_1/2)^2 = 0.0176715 m^2
F_2 := π*(d_2/2)^2 = 0.0706858 m^2
# Уравнение неразрывности
ρ*F_1*c_1 == ρ*F_2*c_2
# Уравнение Бернулли
p_1 + ρ*c_1^2/2 == p_2 + ρ*c_2^2/2
# Уравнение Менделеева-Клайперона
p_1/ρ == R*T_1
R := 287.15*J/(kg*K)
ρ := p_1/(R*T_1) = 8.98119 kg/m^3
G == ρ*c*F
c_1 := G/(ρ*F_1) = 110.894 m/s
c_2 := c_1*F_1/F_2 = 27.7234 m/s
p_2 := p_1 + ρ*c_1^2/2 - ρ*c_2^2/2 = 1031771 Pa
# Уравнение об изменении количества движения
-K_1 + K_2 == p_1*F_1 - p_2*F_2 + R_ж
K_1 := ρ*F_1*c_1^2 = 1951.73 N
K_2 := ρ*F_2*c_2^2 = 487.932 N
R_ж := -K_1 + K_2 - p_1*F_1 + p_2*F_2 = 54149.8 N
# Давление на стенку
R_с := -R_ж = -54149.8 N
# Суммарная сила, учитывающая внешнее давление
R_cΣ := R_с - p_н*(F_1 - F_2) = -1135.41 N
# Сила направлена против движения жидкости
R_cΣ.answer := R_cΣ
# Задача 3
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# Дано
H := (4 + 0.1*N)*m = 4.8 m
L := (18 + N)*m = 26 m
# Решение
# Уравнение движения
dc/dt + c*dc/dx + 1/ρ*dp/dx + g*dz/dx == 0
dz/dx == 0
dc/dt + c*dc/dx + 1/ρ*dp/dx == 0
d/dt(c)*dx + c*dc + 1/ρ*dp == 0
dc/dt*dx == -c*.*dc - 1/ρ*dp
u' == dc/dt
u'*dx == -c*.*dc - 1/ρ*dp
integral(u', x = 0 .. L) == integral(-c, c = 0 .. c) - integral(1/ρ, p = p_a + ρ*g*H .. p_a)
u'*L == -c^2/2 - 1/ρ*(p_a - p_a - ρ*g*H)
u' == -c^2/(2*L) + g*H/L
dc/dt == -c^2/(2*L) + g*H/L
2*L*dc/dt == 2*g*H - c^2
dc/(2*g*H - c^2) == 1/(2*L)*dt
dc/(sqrt(2*g*H)^2 - c^2) == 1/(2*L)*dt
integral(1/(sqrt(2*g*H)^2 - c^2), c) == integral(1/(2*L), t)
# Для интегрирования левой части используем формулу
integral(1/(a^2 - x^2), x) == 1/(2*a)*ln((a + x)/(a - x))
1/(2*sqrt(2*g*H))*ln((sqrt(2*g*H) + c)/(sqrt(2*g*H) - c)) == 1/(2*L)*t + C
1/sqrt(2*g*H)*ln((sqrt(2*g*H) + c)/(sqrt(2*g*H) - c)) == 1/L*t + C/2
# C | - постоянная интегрирования
# Найдем С
# При t=0 скорость равна нулю
# Граничное условие
c(0) == 0
1/sqrt(2*g*H)*ln((sqrt(2*g*H) + 0)/(sqrt(2*g*H) - 0)) == 1/L*0 + C/2
C == 0
1/sqrt(2*g*H)*ln((sqrt(2*g*H) + c)/(sqrt(2*g*H) - c)) == 1/L*t
ln((sqrt(2*g*H) + c)/(sqrt(2*g*H) - c)) == t/L*sqrt(2*g*H)
(sqrt(2*g*H) + c)/(sqrt(2*g*H) - c) == e^(t/L*sqrt(2*g*H))
sqrt(2*g*H) + c == e^(t/L*sqrt(2*g*H))*(sqrt(2*g*H) - c)
sqrt(2*g*H) + c == e^(t/L*sqrt(2*g*H))*sqrt(2*g*H) - e^(t/L*sqrt(2*g*H))*c
c == e^(t/L*sqrt(2*g*H))*sqrt(2*g*H) - e^(t/L*sqrt(2*g*H))*c - sqrt(2*g*H)
c + e^(t/L*sqrt(2*g*H))*c == e^(t/L*sqrt(2*g*H))*sqrt(2*g*H) - sqrt(2*g*H)
c*(1 + e^(t/L*sqrt(2*g*H))) == e^(t/L*sqrt(2*g*H))*sqrt(2*g*H) - sqrt(2*g*H)
c == (e^(t/L*sqrt(2*g*H))*sqrt(2*g*H) - sqrt(2*g*H))/(1 + e^(t/L*sqrt(2*g*H)))
c == sqrt(2*g*H)*(e^(t/L*sqrt(2*g*H)) - 1)/(e^(t/L*sqrt(2*g*H)) + 1)
# Преобразуем формулу для гиперболического тангенса
tanh(x) == (e^x - e^(-x))/(e^x + e^(-x))
tanh(x) == (e^(2*x) - 1)/(e^(2*x) + 1)
# Запишем
c == sqrt(2*g*H)*tanh(t/(2*L)*sqrt(2*g*H))
# Закон изменения скорости
c(t) := sqrt(2*g*H)*tanh(t/(2*L)*sqrt(2*g*H))
# Предельное значение скорости
c_max == limit(sqrt(2*g*H)*tanh(t/(2*L)*sqrt(2*g*H)), t → ∞)
c_max := c(100000000000000000000000000000000000000000000000000000 s) = 9.70277 m/s
c_max = 9.70277 m/s
# Определим время через которое скорость будет равна 50% и 99% от максимальной
c_50% := c_max*0.5 = 4.85139 m/s
H = 4.8 m
L = 26 m
H := 4.4
L := 22
g = 9.80665 m/s^2
g := 9.80665
c_50% := 4.64484983611
c_50% == sqrt(2*g*H)*tanh(t/(2*L)*sqrt(2*g*H)) solve, t → 2.60174937872
t_50% := 2.60174937872 s
c_99% := c_max*0.99 = 9.60575 m/s
c_99% := 9.1968026755
c_99% == sqrt(2*g*H)*tanh(t/(2*L)*sqrt(2*g*H)) solve, t → 12.5356804044
t_99% := 12.5356804044 s
t_50% = 2.60175 s
t_99% = 12.5357 s
# Ответ :
# Задание №1
ξ_answer = 0.188382
# Задание №2
R_cΣ.answer = -1135.41 N
# Сила направлена против движения жидкости
# Задание №3
# Закон изменения скорости:
c(t) := sqrt(2*g*H)*tanh(t/(2*L)*sqrt(2*g*H))  # disabled
c_max = 9.70277 m/s
t_50% = 2.60175 s
t_99% = 12.5357 s
