# Лабораторная работа №8
# Барометрическое давление:
B := 730 torr
table  # each column defines a variable
    № | V_τ (m^3/hr) | t_1сух (°C) | t_1мокр (°C) | t_2 (°C) | t_3 (°C) | ϕ_вых (10^-2) | U (V) | I (A)
    1 | 9.6 | 24.1 | 18.0 | 46.1 | 27.1 | 62.5 | 73.8 | 1.59
    2 | 9.6 | 24.9 | 14.7 | 54.4 | 30.1 | 50.8 | 73.8 | 1.60
    3 | 9.6 | 25.1 | 14.4 | 57.7 | 32.2 | 45.5 | 74.9 | 1.63
    4 | 9.6 | 25.2 | 14.5 | 60.2 | 34.1 | 42.4 | 75.8 | 1.65
    5 | 9.5 | 25.3 | 14.8 | 62.1 | 35.7 | 40.0 | 75.7 | 1.64
    6 | 9.5 | 25.3 | 14.8 | 63.6 | 37.1 | 37.8 | 75.9 | 1.65
    7 | 9.5 | 25.5 | 14.9 | 64.9 | 38.4 | 36.3 | 75.6 | 1.64
    8 | 9.4 | 25.4 | 14.8 | 66.0 | 39.5 | 34.7 | 77.5 | 1.71
    9 | 9.4 | 25.7 | 15.0 | 67.4 | 40.6 | 33.7 | 79.3 | 1.74
    10 | 9.4 | 25.7 | 15.3 | 68.4 | 41.7 | 32.8 | 80.5 | 1.77
    11 | 9.4 | 25.7 | 15.3 | 69.2 | 42.5 | 31.5 | 79.6 | 1.74
    12 | 9.3 | 25.6 | 15.3 | 69.8 | 43.3 | 30.6 | 81.4 | 1.79
    13 | 9.3 | 25.8 | 15.6 | 70.6 | 44.1 | 30.9 | 82.0 | 1.80
    14 | 9.3 | 25.8 | 15.5 | 71.3 | 44.8 | 29.7 | 82.8 | 1.82
    15 | 9.3 | 25.8 | 15.5 | 71.9 | 45.5 | 29.2 | 82.3 | 1.81
    16 | 9.3 | 25.9 | 15.6 | 72.3 | 46.0 | 28.6 | 82.4 | 1.80
    17 | 9.3 | 26.0 | 15.8 | 72.5 | 46.5 | 28.0 | 82.3 | 1.80
    18 | 9.3 | 26.2 | 15.9 | 72.8 | 46.9 | 27.8 | 82.0 | 1.80
    19 | 9.2 | 26.1 | 15.9 | 73.1 | 47.4 | 26.9 | 82.1 | 1.80
    20 | 9.3 | 26.1 | 15.9 | 73.4 | 47.8 | 26.6 | 83.8 | 1.85
end table
d_1 := 7 gm/kg
h_1 := 41*10^3 J/kg
d_2 := 7 gm/kg
h_2 := 89*10^3 J/kg
d_3 := 18 gm/kg
h_3 := 95*10^3 J/kg
t_4 := 14 °C
d_4 := 10.1 gm/kg
h_4 := 40.0*10^3 J/kg
# Расчёт
R_вл.возд := ((287.1 + 461.5*d_1)/(1 + d_1))*J/(kg*K) = 288.312 J/(kg*K)
m_τсух.возд := B*V_τ/(R_вл.возд*(t_1сух + 273.15 °C))*(1 - d_1) = [0.00105967; 0.00105866; 0.00105841; 0.00105829; 0.00104714; 0.00104714; 0.00104689; 0.001036; 0.00103563; 0.00103563; 0.00103563; 0.00102473; 0.00102449; 0.00102449; 0.00102449; 0.00102437; 0.00102425; 0.001024; 0.00101311; 0.00102413] kg/s
m_вод := (d_3 - d_2)*m_τсух.возд = [1.16563e-5; 1.16453e-5; 1.16425e-5; 1.16412e-5; 1.15185e-5; 1.15185e-5; 1.15158e-5; 1.13959e-5; 1.13919e-5; 1.13919e-5; 1.13919e-5; 1.1272e-5; 1.12694e-5; 1.12694e-5; 1.12694e-5; 1.1268e-5; 1.12667e-5; 1.1264e-5; 1.11442e-5; 1.12654e-5] kg/s
p_п := B*d_1/(d_1 + 622*10^-3) = 1083.11 Pa
p_сух.возд := B - p_п = 96242.2 Pa
Q_к := m_τсух.возд*(h_2 - h_1) = [50.8641; 50.8159; 50.8038; 50.7978; 50.2627; 50.2627; 50.2508; 49.7278; 49.7101; 49.7101; 49.7101; 49.1871; 49.1755; 49.1755; 49.1755; 49.1696; 49.1638; 49.1522; 48.6294; 49.158] W
W := vectorize(U*I) = [117.342; 118.08; 122.087; 125.07; 124.148; 125.235; 123.984; 132.525; 137.982; 142.485; 138.504; 145.706; 147.6; 150.696; 148.963; 148.32; 148.14; 147.6; 147.78; 155.03] W
Q_к.пот := Q_к - W = [-66.4779; -67.2641; -71.2832; -74.2722; -73.8853; -74.9723; -73.7332; -82.7972; -88.2719; -92.7749; -88.7939; -96.5189; -98.4245; -101.521; -99.7875; -99.1504; -98.9762; -98.4478; -99.1506; -105.872] W
q := W/(m_τсух.возд*(d_3 - d_2)) = [10066789; 10139709; 10486280; 10743767; 10778100; 10872469; 10766410; 11629136; 12112290; 12507571; 12158112; 12926316; 13097441; 13372168; 13218389; 13162889; 13148469; 13103640; 13260656; 13761633] J/kg
Δm_tвлаж := m_τсух.возд*(d_3 - d_4) = [8.37138e-6; 8.36345e-6; 8.36147e-6; 8.36048e-6; 8.27241e-6; 8.27241e-6; 8.27045e-6; 8.18436e-6; 8.18146e-6; 8.18146e-6; 8.18146e-6; 8.09538e-6; 8.09346e-6; 8.09346e-6; 8.09346e-6; 8.0925e-6; 8.09155e-6; 8.08963e-6; 8.00359e-6; 8.09059e-6] kg/s
Q := Δm_tвлаж*(h_4 - h_3) = [-0.460426; -0.45999; -0.459881; -0.459826; -0.454982; -0.454982; -0.454875; -0.45014; -0.44998; -0.44998; -0.44998; -0.445246; -0.44514; -0.44514; -0.44514; -0.445088; -0.445035; -0.44493; -0.440198; -0.444982] W
