# Worksheet setting: ORIGIN = 1
# Журнал наблюдений
B := 755 torr
β_кр := 0.528
d_2 := 1.31 mm
k := 1.4
V_x := 0.01 m^3
table  # each column defines a variable
    № | P_2 (torr) | P_ср (torr) | t_0 (°C) | τ (sec)
    2 | 736 | 737 | 221 | 140
    3 | 706 | 706 | 22.2 | 70
    4 | 666 | 666 | 22.4 | 61
    5 | 641 | 641 | 22.6 | 58
    6 | 618 | 618 | 22.7 | 53
    7 | 571 | 569 | 22.7 | 49
    8 | 534 | 532 | 22.8 | 45
    9 | 506 | 501 | 22.9 | 43
    10 | 480 | 471 | 23.0 | 41
    11 | 452 | 438 | 23.2 | 40
    12 | 425 | 398 | 23.3 | 40
    13 | 416 | 375 | 23.4 | 40
    14 | 407 | 343 | 23.5 | 40
    15 | 403 | 306 | 23.5 | 40
    16 | 402 | 274 | 23.6 | 40
end table
β_кр := P_ср/B = [0.976159; 0.935099; 0.882119; 0.849007; 0.818543; 0.753642; 0.704636; 0.663576; 0.623841; 0.580132; 0.527152; 0.496689; 0.454305; 0.405298; 0.362914]
V_τд := V_x/τ = [7.14286e-5; 0.000142857; 0.000163934; 0.000172414; 0.000188679; 0.000204082; 0.000222222; 0.000232558; 0.000243902; 0.00025; 0.00025; 0.00025; 0.00025; 0.00025; 0.00025] m^3/s
R := R/(28.97 gm/mol) = 287.003 J/(kg*K)
m_τд := B*V_τд/(R*t_0) = [5.06964e-5; 0.00016964; 0.000194538; 0.000204461; 0.000223675; 0.000241934; 0.00026335; 0.000275506; 0.000288848; 0.000295869; 0.000295769; 0.000295669; 0.00029557; 0.00029557; 0.00029547] kg/s
# Построим графики в OriginPro
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T_04 := 295.75 K
P_4 := 666*torr
T_013 := 296.65*K
P_13 := 416*torr
h_04 := PropsSI("H", "T", T_04, "P", B, "Air") J/kg = 422023 J/kg
h_013 := PropsSI("H", "T", T_013, "P", B, "Air") J/kg = 422928 J/kg
S_04 := PropsSI("S", "T", T_04, "P", B, "Air")*J/(kg*K) = 3874.26 J/(kg*K)
S_013 := PropsSI("S", "T", T_013, "P", B, "Air")*J/(kg*K) = 3877.31 J/(kg*K)
h_4 := PropsSI("H", "S", S_04, "P", P_4, "Air") J/kg = 411567 J/kg
h_13 := PropsSI("H", "S", S_013, "P", P_13, "Air") J/kg = 376287 J/kg
T_4 := PropsSI("T", "S", S_04, "P", P_4, "Air")*K = 285.328 K
T_13 := PropsSI("T", "S", S_013, "P", P_13, "Air")*K = 250.129 K
v_4 := R*T_4/P_2[3, :] = [0.922258] m^3/kg
v_13 := R*T_13/P_2[12, :] = [1.29435] m^3/kg
w_24 := 44.72*sqrt((h_04 - h_4)/1000) = 144.602 m/s
w_213 := 44.72*sqrt((h_013 - h_13)/1000) = 305.414 m/s
f_2 := π*d_2^2/4 = 1.34782 mm^2
m_τ3 := f_2*w_24/v_4 = [0.000211327] kg/s
m_τ13 := f_2*w_213/v_13 = [0.00031803] kg/s
μ_4 := m_τд[3, :]/m_τ3 = 0.920553
μ_13 := m_τд[12, :]/m_τ13 = 0.929692
# Используя CoolProp и Python определим температуры действительных процессов, стоит также учесть, что ввиду того, что часть данных была рассчитана по Ривкину, температура действительная в отрицательной зоне может оказаться немного ниже идеальной по Ривкину.
# Программа написана на Python и скомпилирована, на данной флэшке находится исходный файл и файл LaboratoryWorkN9.exe, ввиду отсутствия цифровой подписи определяется защитником Windows, как вирус, перед использование программы необходимо добавить её в исключение, либо на время отключить защитник Windows.
# Автор программы Маркин Михаил Ашотович, распространяется под лицензией GNU GPL V3.
# https://github.com/Monolith-lab/LaboratoryWork-9
T_4д := 286.78169 K
T_13д := 254.81720 K
h_4д := PropsSI("H", "T", T_4д, "P", P_4, "Air") J/kg = 413029 J/kg
h_13д := PropsSI("H", "T", T_13д, "P", P_13, "Air") J/kg = 380996 J/kg
w_24д := 44.72*sqrt((h_04 - h_4д)/1000) = 134.11 m/s
w_213д := 44.72*sqrt((h_013 - h_13д)/1000) = 289.586 m/s
a_4 := sqrt(k*R*T_4) = 338.594 m/s
a_4д := sqrt(k*R*T_4д) = 339.455 m/s
a_13 := sqrt(k*R*T_13) = 317.022 m/s
a_13д := sqrt(k*R*T_13д) = 319.979 m/s
M_3 := w_24/a_4 = 0.427067
M_3д := w_24д/a_4д = 0.395075
M_13 := w_213/a_13 = 0.963384
M_13д := w_213д/a_13д = 0.905015
ϕ_3 := w_24д/w_24 = 0.927443
ϕ_13 := w_213д/w_213 = 0.948176
